14/03/2014
15:21

$PROB WARFARIN PK
;O'Reilly RA, Aggeler PM, Leong LS. Studies of the coumarin anticoagulant
;drugs: The pharmacodynamics of warfarin in man.
;Journal of Clinical Investigation 1963;42(10):1542-1551

;O'Reilly RA, Aggeler PM. Studies on coumarin anticoagulant drugs
;Initiation of warfarin therapy without a loading dose.
;Circulation 1968;38:169-177

$INPUT ID TIME WT AGE SEX AMT DVID DV MDV
$DATA example3.csv IGNORE=#
IGNORE (DVID.EQ.2) ; ignore PCA observations

$EST METHOD=COND INTER
MAX=9990 SIG=3 NOABORT ;PRINT=1
$COV

$THETA
(0.001,0.1) ; POP_CL L/h/70kg
(0.001,8)   ; POP_V  L/70kg
(0.001,2) ; POP_KA h-1
(0.001,1) ; POP_TLAG h

$OMEGA BLOCK(2)
0.1 ; PPV_CL
0.01 0.1 ; PPV_V
$OMEGA
0.1 ; PPV_KA
0.1 ; PPV_TLAG

$SIGMA
0.01 ; RUV_PROP
0.05 ; RUV_ADD mg/L

$PRED
   IF (AMT.GT.0) DOSE=AMT
   ; Covariate model
   GRPCL=THETA(1)*(WT/70)**0.75
   GRPV=THETA(2)*WT/70
   GRPKA=THETA(3)
   GRPLG=THETA(4)

   ; Individual parameters
   CL=GRPCL*EXP(ETA(1))
   V=GRPV*EXP(ETA(2))
   KA=GRPKA*EXP(ETA(3))
   TLAG=GRPLG*EXP(ETA(4))

   IF (TIME.LE.TLAG) THEN
      CONC=0
   ELSE
      TNOW=TIME-TLAG
      K=CL/V
      CONC=DOSE*KA/(V*(KA-K))*(EXP(-K*TNOW) - EXP(-KA*TNOW))
   ENDIF
   Y=CONC*(1+ERR(1))+ERR(2)

$TABLE ID TIME WT SEX AGE ; covariates
CL V KA TLAG ; EBE estimates
DVID Y ; predictions
ONEHEADER NOPRINT FILE=warf.fit

NM-TRAN MESSAGES
 WARNINGS AND ERRORS (IF ANY) FOR PROBLEM    1
 (WARNING  2) NM-TRAN INFERS THAT THE DATA ARE POPULATION.
 (WARNING  3) THERE MAY BE AN ERROR IN THE ABBREVIATED CODE. THE FOLLOWING
 ONE OR MORE RANDOM VARIABLES ARE DEFINED WITH "IF" STATEMENTS THAT DO NOT
 PROVIDE DEFINITIONS FOR BOTH THE "THEN" AND "ELSE" CASES. IF ALL
 CONDITIONS FAIL, THE VALUES OF THESE VARIABLES WILL BE ZERO.
   TNOW K

1NONLINEAR MIXED EFFECTS MODEL PROGRAM (NONMEM) VERSION 7.2.0
 ORIGINALLY DEVELOPED BY STUART BEAL, LEWIS SHEINER, AND ALISON BOECKMANN
 CURRENT DEVELOPERS ARE ROBERT BAUER, ICON DEVELOPMENT SOLUTIONS,
 AND ALISON BOECKMANN. IMPLEMENTATION, EFFICIENCY, AND STANDARDIZATION
 PERFORMED BY NOUS INFOSYSTEMS.
 PROBLEM NO.:         1
 WARFARIN PK
 TOT. NO. OF OBS RECS:      250
 TOT. NO. OF INDIVIDUALS:     32
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 #TBLN:      1
 #METH: First Order Conditional Estimation with Interaction
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
 #TERM:
0MINIMIZATION SUCCESSFUL
 NO. OF FUNCTION EVALUATIONS USED:      341
 NO. OF SIG. DIGITS IN FINAL EST.:  3.2
0PARAMETER ESTIMATE IS NEAR ITS BOUNDARY
 THIS MUST BE ADDRESSED BEFORE THE COVARIANCE STEP CAN BE IMPLEMENTED

 ETABAR IS THE ARITHMETIC MEAN OF THE ETA-ESTIMATES,
 AND THE P-VALUE IS GIVEN FOR THE NULL HYPOTHESIS THAT THE TRUE MEAN IS 0.

 ETABAR:         2.6562E-04 -5.2429E-03 -1.6753E-02  7.8108E-03
 SE:             4.5892E-02  2.2584E-02  7.1157E-02  2.4317E-02

 P VAL.:         9.9538E-01  8.1642E-01  8.1387E-01  7.4806E-01

 ETAshrink(%):   1.5779E+00  9.8703E+00  4.6508E+01  5.9253E+01
 EPSshrink(%):   1.4200E+01  1.4889E+01

 #TERE:
 Elapsed estimation time in seconds:     1.02

 ********************               FIRST ORDER CONDITIONAL ESTIMATION WITH INTERACTION              ********************
 #OBJT:**************                       MINIMUM VALUE OF OBJECTIVE FUNCTION                      ********************
 #OBJV:********************************************      250.627       **************************************************

 ********************               FIRST ORDER CONDITIONAL ESTIMATION WITH INTERACTION              ********************
 ********************                             FINAL PARAMETER ESTIMATE                           ********************

 THETA - VECTOR OF FIXED EFFECTS PARAMETERS   *********
         TH 1      TH 2      TH 3      TH 4
         1.35E-01  7.99E+00  1.28E+00  8.65E-01

 OMEGA - COV MATRIX FOR RANDOM EFFECTS - ETAS  ********
            ETA1      ETA2      ETA3      ETA4
 ETA1
+        7.18E-02
 ETA2
+        5.23E-03  2.07E-02
 ETA3
+        0.00E+00  0.00E+00  5.85E-01
 ETA4
+        0.00E+00  0.00E+00  0.00E+00  1.18E-01

 SIGMA - COV MATRIX FOR RANDOM EFFECTS - EPSILONS  ****
            EPS1      EPS2
 EPS1
+        1.00E-06
 EPS2
+        0.00E+00  4.48E-01

 OMEGA - CORR MATRIX FOR RANDOM EFFECTS - ETAS  *******
            ETA1      ETA2      ETA3      ETA4
 ETA1
+        2.68E-01
 ETA2
+        1.36E-01  1.44E-01
 ETA3
+        0.00E+00  0.00E+00  7.65E-01
 ETA4
+        0.00E+00  0.00E+00  0.00E+00  3.43E-01

 SIGMA - CORR MATRIX FOR RANDOM EFFECTS - EPSILONS  ***
            EPS1      EPS2
 EPS1
+        1.00E-03
 EPS2
+        0.00E+00  6.69E-01
